// COMSOL Multiphysics 5.3.1.201 model "Untitled.mph"
// Outline of the model tree

Coordinate systems
  sys2: Cylindrical "Cylindrical System 2"

Geometry
  geom1 "Geometry 1" (2D, length unit m)
    c1: Circle | r = 50[mm]
    c2: Circle | r = 54[mm]; angle = 72
    c6: Circle | rot = 90; r = 54[mm]; angle = 72
    c7: Circle | rot = 180; r = 54[mm]; angle = 72
    c8: Circle | rot = 270; r = 54[mm]; angle = 72
    dif1: Difference | input = c2, c6, c7, c8; input2 = c1
    c5: Circle | r = 50[mm]
    c3: Circle | r = 55[mm]
    c9: Circle | r = 54.5[mm]
    c4: Circle | r = 70[mm]
    fin: Finalize "Form Union"

Materials
  mat1: Common "Iron" on all domains
    def "Basic"
      relpermeability = 4000
      electricconductivity = 1.12e7[S/m]
      thermalexpansioncoefficient = 12.2e-6[1/K]
      heatcapacity = 440[J/(kg*K)]
      relpermittivity = 1
      density = 7870[kg/m^3]
      thermalconductivity = 76.2[W/(m*K)]
    Enu "Young's modulus and Poisson's ratio"
      youngsmodulus = 200e9[Pa]
      poissonsratio = 0.29
  mat2: Common "Air" on domains 1-5, 7
    def "Basic"
      relpermeability = 1
      relpermittivity = 1
      dynamicviscosity = eta(T[1/K])[Pa*s]
      ratioofspecificheat = 1.4
      electricconductivity = 1[S/m]
      heatcapacity = Cp(T[1/K])[J/(kg*K)]
      density = rho(pA[1/Pa],T[1/K])[kg/m^3]
      thermalconductivity = k(T[1/K])[W/(m*K)]
      soundspeed = cs(T[1/K])[m/s]
      eta: Piecewise | arg = T; pieces = {200.0, 1600.0, -8.38278E-7+8.35717342E-8*T^1-7.69429583E-11*T^2+4.6437266E-14*T^3-1.06585607E-17*T^4}
      Cp: Piecewise | arg = T; pieces = {200.0, 1600.0, 1047.63657-0.372589265*T^1+9.45304214E-4*T^2-6.02409443E-7*T^3+1.2858961E-10*T^4}
      rho: Analytic | expr = pA*0.02897/R_const[K*mol/J]/T; args = {pA, T}; dermethod = manual; argders = {{pA, d(pA*0.02897/R_const/T,pA)}, {T, d(pA*0.02897/R_const/T,T)}}
      k: Piecewise | arg = T; pieces = {200.0, 1600.0, -0.00227583562+1.15480022E-4*T^1-7.90252856E-8*T^2+4.11702505E-11*T^3-7.43864331E-15*T^4}
      cs: Analytic | expr = sqrt(1.4*287*T); args = T; dermethod = manual; argders = {T, d(sqrt(1.4*287*T),T)}
    RefractiveIndex
      n = 1
      ki = 0

Physics
  rmm: RotatingMachineryMagnetic on all domains
    dependent variable A = {Ax, Ay, Az}
    ShapeProperty.order_magneticvectorpotential = 1
    etf1: ElectricFieldTransformation (default)
    al1: AmperesLaw "Ampère's Law 1" (default)
    mxb1: MixedFormulationBoundary (default)
    mi1: MagneticInsulation (default)
    init1: init "Initial Values 1" (default)
    al2: AmperesLaw "Ampère's Law 2" on domains 3, 4
      ConstitutiveRelationH = RemanentFluxDensity
      Br = {1.02, 0, 0}
      coordinateSystem = sys2
    al3: AmperesLaw "Ampère's Law 3" on domains 2, 5
      ConstitutiveRelationH = RemanentFluxDensity
      Br = {-1.02, 0, 0}
      coordinateSystem = sys2

Mesh
  mesh1 "Mesh 1" (physics-controlled)

Studies
  std1 "Study 1"
    stat: Stationary

Solver configurations
  sol1 "Solution 1" (study std1)
    v1: Variables "Dependent Variables 1"
    s1: Stationary "Stationary Solver 1"
      dDef: Direct
      fc1: FullyCoupled | linsolver = dDef

Datasets
  dset1: Solution | solution = sol1
  dset2: Solution on boundaries 23, 27 | solution = sol1

Derived values
  gev1: EvalGlobal "Global Evaluation 1" | data = dset2; table = tbl1; expr = rrm.normB

Plots
  pg1: PlotGroup2D "Magnetic Flux Density (rmm)" | data = dset1
    surf1: Surface | expr = rmm.normB
    con1: Contour | expr = rmm.Az
  pg2: PlotGroup1D "1D Plot Group 2" | data = dset1
    lngr1: LineGraph on boundaries 23, 27 | expr = rmm.normB; title = Airgap Flux Distribution (T)